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p := 10^-12
n := 10^-9
u := 10^-6
m := 10^-3
k := 10^3
M := 10^6
V_IN := 22.2
I_OUT := 2
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R_P := 50 k
R_2 := 3.9 k
R_FIX := 18 k
V_OUT_MIN := 0.8*(R_FIX/R_2 + 1) = 4.49231
V_OUT_MAX := 0.8*((R_FIX + R_P)/R_2 + 1) = 14.7487
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f_sw := 500 k
L := V_OUT*(V_IN - V_OUT)/(V_IN*ΔI_L*f_sw)  # error: Эта переменная не определена. Проверьте правильность установки обозначения.
